# Лабораторная работа 1. Задание 1 | ВАРИАНТ 3
# 1 ) Область определения функции
y(x) := (x - 1)*e^x
# x принадлежит множеству действительных чисел R
# 2 ) Исследование функции на четность/нечетность
y(-x) → -e^(-x)*(x + 1)
# Функция является функцией общего вида
# 3 ) Точки пересечения графика функции с осями координат
y(x) solve → 1
# Точка пересечения с осью Ох: (1,0)
y(0) → -1
# Точка пересечения с осью Оу: (0,-1)
# 4 ) Исследование функции на непрерывность
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# Точек разрыва  и вертикальных асимптот не существует..
# Функция непрерывна
# 5 ) Исследование поведения функции на бесконечности
limit(y(x), x → ∞) → ∞
limit(y(x), x → -∞) → 0
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# горизонтальная асимптота у=0
# 6 ) Наклонные асимптоты
k := limit(y(x)/x, x → ∞) → ∞  # Так как коэффициент к равен ∞, то наклонных асимптот не существует
# 7 ) Первая производная,  интервалы возрастани/убывания, экстремумы
y1(x) := d/dx(y(x)) → e^x + e^x*(x - 1)  # - первая производная ф-и
y1(x) > 0 solve → 0 < x  # - интервал возрастания ф-и
y1(x) < 0 solve → x < 0  # - интервал убывания ф-и
y1(x) solve → 0  # точка минимума ф-и: x=0
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# 8 ) Вторая производная, интервалы выгнутости и вогнутости, точки перегиба
y2(x) := d^2/dx^2(y(x)) → 2*e^x + e^x*(x - 1)  # -вторая производная ф-и
y2(x) > 0 solve → -1 < x  # -интервал вогнутости ф-и
y2(x) < 0 solve → x < -1  # -интервал выгнутости ф-и
y2(x) solve → -1  # точка перегиба: x=--1
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# Полярная система координат. Архимедова спираль. | Задание 3
a := 5
r(φ) := a*φ
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# Функция, заданная параметрически. | Задание 2
x(t) := a*t^2/(1 + t^2)
y3(t) := a*t^3/(1 + t^2)
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